// SBML level 3 version 2

model GeneticToggle(Cell)

  // Compartments:
  compartment Cell = 1;

  // Species:
  substanceOnly species GFP in Cell = 0;
  substanceOnly species LacI in Cell = 0;
  substanceOnly species TetR in Cell = 0;
  substanceOnly species pLac in Cell = 2;
  substanceOnly species pTet in Cell = 2;
  substanceOnly species $IPTG in Cell = 0;
  substanceOnly species IPTG_LacI in Cell = 0;
  substanceOnly species aTc_TetR in Cell = 0;
  substanceOnly species $aTc in Cell = 0;

  // Parameters:
  kr_f = 0.5; kr_f is "Forward repression binding rate";
  kr_r = 1; kr_r is "Reverse repression binding rate";
  ka_f = 0.0033; ka_f is "Forward activation binding rate";
  ka_r = 1; ka_r is "Reverse activation binding rate";
  ko_f = 0.033; ko_f is "Forward RNAP binding rate";
  ko_r = 1; ko_r is "Reverse RNAP binding rate";
  kao_f = 1; kao_f is "Forward activated RNAP binding rate";
  kao_r = 1; kao_r is "Reverse activated RNAP binding rate";
  nc = 2; nc is "Stoichiometry of binding";
  nr = 30; nr is "Initial RNAP count";
  ko = 0.05; ko is "Open complex production rate";
  kb = 0.0001; kb is "Basal production rate";
  ng = 2; ng is "Initial promoter count";
  np = 10; np is "Stoichiometry of production";
  ka = 0.25; ka is "Activated production rate";
  kd = 0.0075; kd is "Degradation rate";
  kc_f = 0.05; kc_f is "Forward complex formation rate";
  kc_r = 1; kc_r is "Reverse complex formation rate";

  // Reactions:
  Production_pLac: => 10 GFP + 10 TetR; pLac*ko*ko_f/ko_r*nr/(1 + ko_f/ko_r*nr + (kr_f/kr_r*LacI)^nc);  // modifiers: pLac, LacI
  Production_pTet: => 10 LacI; pTet*ko*ko_f/ko_r*nr/(1 + ko_f/ko_r*nr + (kr_f/kr_r*TetR)^nc);  // modifiers: pTet, TetR
  Degradation_IPTG_LacI: IPTG_LacI => ; kd*IPTG_LacI;
  Complex_IPTG_LacI: LacI + $IPTG -> IPTG_LacI; kc_f*LacI^nc_LacI*IPTG^nc_IPTG - kc_r*IPTG_LacI;
    nc_IPTG = 1; nc_LacI = 1;
  Degradation_aTc_TetR: aTc_TetR => ; kd*aTc_TetR;
  Complex_aTc_TetR: $aTc + TetR -> aTc_TetR; kc_f*aTc^nc_aTc*TetR^nc_TetR - kc_r*aTc_TetR;
    nc_aTc = 1; nc_TetR = 1;
  Degradation_GFP: GFP => ; kd*GFP;
  Degradation_TetR: TetR => ; kd*TetR;
  Degradation_LacI: LacI => ; kd*LacI;

  // Events:
  IPTG_High: at (2000) after (true), t0=false, persistent=false, fromTrigger=false: IPTG = 60;
  IPTG_Low: at (4000) after (true), t0=false, persistent=false, fromTrigger=false: IPTG = 0;
  aTc_High: at (6000) after (true), t0=false, persistent=false, fromTrigger=false: aTc = 60;
  aTc_Low: at (8000) after (true), t0=false, persistent=false, fromTrigger=false: aTc = 0;
end
