// SBML level 3 version 2

model sbolcanvas_model()

  // Compartments:
  compartment Cell = 1;

  // Species:
  substanceOnly species pLac in Cell = 2;
  substanceOnly species pTet in Cell = 2;
  substanceOnly species IPTG_LacI in Cell = 0;
  substanceOnly species LacI in Cell = 0;
  substanceOnly species GFP in Cell = 0;
  substanceOnly species TetR in Cell = 0;
  substanceOnly species $IPTG in Cell = 0;
  substanceOnly species aTc_TetR in Cell = 0;
  substanceOnly species $aTc in Cell = 0;

  // Reactions:
  Production_pTet: => 10 LacI; pTet*Production_pTet_ko*(Production_pTet_ko_f/Production_pTet_ko_r)*Production_pTet_nr/(1 + Production_pTet_ko_f/Production_pTet_ko_r*Production_pTet_nr + (kr_f_TetR/kr_r_TetR*TetR)^Production_pTet_nc_TetR);  // modifiers: pTet, TetR
    Production_pTet_ko = 0.05; Production_pTet_ko_f = 0.033; Production_pTet_ko_r = 1; Production_pTet_nr = 30; kr_f_TetR = 0.5; kr_r_TetR = 1; Production_pTet_nc_TetR = 2;
  Production_pLac: => 10 TetR + 10 GFP; pLac*Production_pLac_ko*(Production_pLac_ko_f/Production_pLac_ko_r)*Production_pLac_nr/(1 + Production_pLac_ko_f/Production_pLac_ko_r*Production_pLac_nr + (kr_f_LacI/kr_r_LacI*LacI)^Production_pLac_nc_LacI);  // modifiers: pLac, LacI
    Production_pLac_ko = 0.05; Production_pLac_ko_f = 0.033; Production_pLac_ko_r = 1; Production_pLac_nr = 30; kr_f_LacI = 0.5; kr_r_LacI = 1; Production_pLac_nc_LacI = 2;
  Degradation_aTc_TetR: aTc_TetR => ; Degradation_aTc_TetR_kd*aTc_TetR;
    Degradation_aTc_TetR_kd = 0.0075;
  Degradation_TetR: TetR => ; Degradation_TetR_kd*TetR;
    Degradation_TetR_kd = 0.0075;
  Degradation_GFP: GFP => ; Degradation_GFP_kd*GFP;
    Degradation_GFP_kd = 0.0075;
  Degradation_IPTG_LacI: IPTG_LacI => ; Degradation_IPTG_LacI_kd*IPTG_LacI;
    Degradation_IPTG_LacI_kd = 0.0075;
  Degradation_LacI: LacI => ; Degradation_LacI_kd*LacI;
    Degradation_LacI_kd = 0.0075;
  Complex_IPTG_LacI: $IPTG + LacI -> IPTG_LacI; Complex_IPTG_LacI_kc_f*IPTG^nc_IPTG*LacI^Complex_IPTG_LacI_nc_LacI - Complex_IPTG_LacI_kc_r*IPTG_LacI;
    nc_IPTG = 1; Complex_IPTG_LacI_nc_LacI = 1; Complex_IPTG_LacI_kc_f = 0.05; Complex_IPTG_LacI_kc_r = 1;
  Complex_aTc_TetR: $aTc + TetR -> aTc_TetR; Complex_aTc_TetR_kc_f*aTc^nc_aTc*TetR^Complex_aTc_TetR_nc_TetR - Complex_aTc_TetR_kc_r*aTc_TetR;
    nc_aTc = 1; Complex_aTc_TetR_nc_TetR = 1; Complex_aTc_TetR_kc_f = 0.05; Complex_aTc_TetR_kc_r = 1;

  // Events:
  IPTG_Low: at (4000) after (true), t0=false, persistent=false, fromTrigger=false: IPTG = 0;
  aTc_High: at (6000) after (true), t0=false, persistent=false, fromTrigger=false: aTc = 60;
  aTc_Low: at (8000) after (true), t0=false, persistent=false, fromTrigger=false: aTc = 0;
  IPTG_High: at (2000) after (true), t0=false, persistent=false, fromTrigger=false: IPTG = 60;
end
